<?xml version="1.0"?>

<turbine_engine name="AMT_Titan">
  <milthrust>      78.5 </milthrust>
  <bypassratio>     0.0 </bypassratio>
  <tsfc>            1.8 </tsfc>
  <bleed>           0.0 </bleed>
  <idlen1>         0.0  </idlen1>
  <idlen2>         30.0 </idlen2>
  <maxn1>         0.0   </maxn1>
  <maxn2>         100.0 </maxn2>
  <augmented>         0 </augmented>
  <injected>          0 </injected>

  <!--
      The engine used for block 52.

      Sources:
              Turbofan and Turbojet Engines: Database Handbook by Elodie Roux
              AeromatiC++
  -->

  <function name="IdleThrust">
   <table>
    <independentVar lookup="row">velocities/mach</independentVar>
    <independentVar lookup="column">atmosphere/density-altitude</independentVar>
    <tableData>
               0     5000   10000   15000   20000
     0.0    0.639   0.527  0.434   0.355   0.287
     0.2    0.565   0.486  0.401   0.326   0.264
     0.4    0.560   0.523  0.430   0.352   0.286
     0.6    0.582   0.545  0.501   0.410   0.333
     0.8    0.616   0.574  0.529   0.484   0.406
    </tableData>
   </table>
  </function>

  <function name="MilThrust">
   <table>
    <independentVar lookup="row">velocities/mach</independentVar>
    <independentVar lookup="column">atmosphere/density-altitude</independentVar>
    <tableData>
            0     5000   10000   15000   20000
     0.0   1.000  0.829  0.684   0.559   0.454
     0.2   0.895  0.750  0.612   0.505   0.411
     0.4   0.861  0.755  0.621   0.508   0.412
     0.6   0.868  0.792  0.691   0.564   0.458
     0.8   0.915  0.835  0.757   0.682   0.552
    </tableData>
   </table>
  </function>

</turbine_engine>
