<?xml version="1.0"?>
<?xml-stylesheet href="http://jsbsim.sourceforge.net/JSBSim.xsl" type="text/xsl"?>
<fdm_config name="HSTD" version="2.0" release="BETA"
 xmlns:xsi="http://www.w3.org/2001/XMLSchema-instance"
 xsi:noNamespaceSchemaLocation="http://jsbsim.sourceforge.net/JSBSim.xsd">

    <fileheader>
        <author> Waleed </author>
        <filecreationdate> 28/11/22 </filecreationdate>
        <version> Version </version>
        <description> HSTD </description>
    </fileheader>

 <metrics>
   <wingarea  unit="FT2">    3.25 </wingarea>
   <wingspan  unit="FT" >    3.65 </wingspan>
   <wing_incidence>          2.00 </wing_incidence>
   <chord     unit="FT" >    0.89 </chord>
   <htailarea unit="FT2">    1.04 </htailarea>
   <htailarm  unit="FT" >    2.58 </htailarm>
   <vtailarea unit="FT2">    0.88 </vtailarea>
   <vtailarm  unit="FT" >    2.58 </vtailarm>
   <location name="AERORP" unit="IN">
     <x>  44.88 </x>
     <y>   0.00 </y>
     <z>   0.00 </z>
   </location>
   <location name="EYEPOINT" unit="IN">
     <x>  10.90 </x>
     <y> -18.00 </y>
     <z>  45.00 </z>
   </location>

   <location name="VRP" unit="IN">
     <x>0</x>
     <y>0</y>
     <z>25</z>
   </location>
 </metrics>

<mass_balance>
  <ixx unit="SLUG*FT2"> 0.648 </ixx>
  <iyy unit="SLUG*FT2"> 9.972 </iyy>
  <izz unit="SLUG*FT2"> 10.27 </izz>
  <ixy unit="SLUG*FT2"> 0 </ixy>
  <ixz unit="SLUG*FT2"> -0.37 </ixz>
  <iyz unit="SLUG*FT2"> 0 </iyz>
   <emptywt unit="LBS" > 57 </emptywt>
   <location name="CG" unit="IN">
     <x>  44.88 </x>
     <y>   0.00 </y>
     <z>  -2.10 </z>
   </location>
 </mass_balance>

<ground_reactions>

  <contact type="BOGEY" name="NOSE">
   <location unit="IN">
     <x>  18.30 </x>
     <y>   0.00 </y>
     <z> -14.65 </z>
   </location>
   <static_friction>  0.80 </static_friction>
   <dynamic_friction> 0.50 </dynamic_friction>
   <rolling_friction> 0.02 </rolling_friction>
   <spring_coeff unit="LBS/FT">         15 </spring_coeff>
   <damping_coeff unit="LBS/FT/SEC">    15 </damping_coeff>
   <max_steer unit="DEG"> 5.00 </max_steer>
   <brake_group>NONE</brake_group>
   <retractable>0</retractable>
  </contact>

  <contact type="BOGEY" name="LEFT_MAIN">
   <location unit="IN">
     <x>  61.02 </x>
     <y>  -6.13 </y>
     <z> -14.65 </z>
   </location>
   <static_friction>  0.80 </static_friction>
   <dynamic_friction> 0.50 </dynamic_friction>
   <rolling_friction> 0.02 </rolling_friction>
   <spring_coeff unit="LBS/FT">        15 </spring_coeff>
   <damping_coeff unit="LBS/FT/SEC">    15 </damping_coeff>
   <max_steer unit="DEG">0</max_steer>
   <brake_group>LEFT</brake_group>
   <retractable>0</retractable>
  </contact>

  <contact type="BOGEY" name="RIGHT_MAIN">
   <location unit="IN">
     <x>  61.02 </x>
     <y>   6.13 </y>
     <z> -14.65 </z>
   </location>
   <static_friction>  0.80 </static_friction>
   <dynamic_friction> 0.50 </dynamic_friction>
   <rolling_friction> 0.02 </rolling_friction>
   <spring_coeff unit="LBS/FT">        15 </spring_coeff>
   <damping_coeff unit="LBS/FT/SEC">    15 </damping_coeff>
   <max_steer unit="DEG">0</max_steer>
   <brake_group>RIGHT</brake_group>
   <retractable>0</retractable>
  </contact>
<!--
  <contact type="STRUCTURE" name="LEFT_WING">
    <location unit="IN">
     <x>  70.08 </x>
     <y> -33.85</y>
     <z>   0.1181 </z>
    </location>
    <static_friction>  1.00 </static_friction>
    <dynamic_friction> 1.00 </dynamic_friction>
    <spring_coeff unit="LBS/FT">        126.13 </spring_coeff>
    <damping_coeff unit="LBS/FT/SEC">   126.13 </damping_coeff>
  </contact>

  <contact type="STRUCTURE" name="RIGHT_WING">
    <location unit="IN">
     <x>  70.08 </x>
     <y>  33.85 </y>
     <z>   0.1181 </z>
    </location>
    <static_friction>  1.00 </static_friction>
    <dynamic_friction> 1.00 </dynamic_friction>
    <spring_coeff unit="LBS/FT">        126.13 </spring_coeff>
    <damping_coeff unit="LBS/FT/SEC">   126.13 </damping_coeff>
  </contact>
-->
 </ground_reactions>

<external_reactions>
   <force name="catapult" frame="BODY">
  <location unit="IN">
    <x> 0 </x>
    <y> 0 </y>
    <z> 0 </z>
  </location>
  <direction>
    <x>  1 </x>
    <y>  0 </y>
    <z>  0 </z>
  </direction>
   </force>
 </external_reactions>

<propulsion>

   <engine file="AMT_Titan">
    <location unit="IN">
      <x>  77.18 </x>
      <y>   0.00 </y>
      <z>   0.00 </z>
    </location>
    <orient unit="DEG">
      <pitch> 0.00 </pitch>
      <roll>  0.00 </roll>
      <yaw>   0.00 </yaw>
    </orient>
    <feed>0</feed>
    <thruster file="direct">
     <location unit="IN">
       <x>  77.18 </x>
       <y>   0.00 </y>
       <z>   0.00 </z>
     </location>
     <orient unit="DEG">
       <pitch> 0.00 </pitch>
       <roll>  0.00 </roll>
       <yaw>   0.00 </yaw>
     </orient>
    </thruster>
  </engine>

  <tank type="FUEL" number="0">
     <location unit="IN">
       <x>  44.44 </x>
       <y>   0.00 </y>
       <z>  -2.10 </z>
     </location>
     <capacity unit="LBS">   17 </capacity>
     <contents unit="LBS">   17 </contents>
  </tank>

  <tank type="FUEL" number="1">
     <location unit="IN">
       <x>  44.44 </x>
       <y>   0.00 </y>
       <z>  -2.10 </z>
     </location>
     <capacity unit="LBS">   17 </capacity>
     <contents unit="LBS">   17 </contents>
  </tank>

 </propulsion>

 <!-- Flight Control -->
 <flight_control name="HSTD">

  <channel name="Roll">

    <summer name="Roll Trim Sum">
        <input>fcs/aileron-cmd-norm</input>
        <input>fcs/roll-trim-cmd-norm</input>
        <clipto>
            <min>-1</min>
            <max>1</max>
        </clipto>
    </summer>
     <aerosurface_scale name="Left Aileron Control">
        <input>fcs/roll-trim-sum</input>
        <range>
            <min>-0.0875</min>
            <max>0.0875</max>
        </range>
        <output>fcs/left-aileron-pos-rad</output>
    </aerosurface_scale>

    <aerosurface_scale name="Right Aileron Control">
        <input>-fcs/roll-trim-sum</input>
        <range>
            <min>-0.0875</min>
            <max>0.0875</max>
        </range>
        <output>fcs/right-aileron-pos-rad</output>
    </aerosurface_scale>

    <aerosurface_scale name="Left aileron Normalized">
        <input>fcs/left-aileron-pos-rad</input>
        <domain>
            <min>-0.0875</min>
            <max> 0.0875</max>
        </domain>
        <range>
            <min>-1</min>
            <max> 1</max>
        </range>
        <output>fcs/left-aileron-pos-norm</output>
    </aerosurface_scale>

    <aerosurface_scale name="Right aileron Normalized">
        <input>fcs/right-aileron-pos-rad</input>
        <domain>
            <min>-0.0875</min>
            <max> 0.0875</max>
        </domain>
        <range>
            <min>-1</min>
            <max> 1</max>
        </range>
        <output>fcs/right-aileron-pos-norm</output>
    </aerosurface_scale>
  </channel>

  <channel name="Pitch">

    <summer name="Pitch Trim Sum">
        <input>fcs/elevator-cmd-norm</input>
        <input>fcs/pitch-trim-cmd-norm</input>
        <clipto>
            <min>-1</min>
            <max>1</max>
        </clipto>
    </summer>

	<aerosurface_scale name="Elevator Control">
        <input>fcs/pitch-trim-sum</input>
        <range>
            <min>-0.175</min>
            <max>0.175</max>
        </range>
        <output>fcs/elevator-pos-rad</output>
    </aerosurface_scale>

   <summer name="fcs/dht-left-pos-rad">
     <input>-fcs/elevator-pos-rad</input>
     <clipto>
    <min>-0.175</min>
    <max>0.175</max>
     </clipto>
     <output>fcs/elevator-pos-norm</output>
    </summer>

    <summer name="fcs/dht-right-pos-rad">
     <input>fcs/elevator-pos-rad</input>
     <clipto>
    <min>-0.175</min>
    <max>0.175</max>
     </clipto>
     <output>/sim/multiplay/generic/float[4]</output>
    </summer>

  </channel>

  <channel name="Yaw">

   <summer name="Rudder Command Sum">
       <input>fcs/rudder-cmd-norm</input>
       <input>fcs/yaw-trim-cmd-norm</input>
       <clipto>
           <min>0</min>
           <max>0</max>
       </clipto>
   </summer>

   <aerosurface_scale name="Rudder Control">
       <input>fcs/rudder-command-sum</input>
       <range>
           <min>0</min>
           <max>0</max>
       </range>
       <output>fcs/rudder-pos-rad</output>
   </aerosurface_scale>

   <aerosurface_scale name="Rudder Normalized">
       <input>fcs/rudder-pos-rad</input>
       <domain>
           <min>0</min>
           <max> 0</max>
       </domain>
       <range>
           <min>0</min>
           <max> 0</max>
       </range>
       <output>fcs/rudder-pos-norm</output>
   </aerosurface_scale>

  </channel>

<!-- Landing gear movement-->
  <channel name="Landing Gear">

   <kinematic name="fcs/gear-control">
    <input>gear/gear-cmd-norm</input>
    <traverse>
     <setting>
      <position>0</position>
      <time>0</time>
     </setting>
     <setting>
      <position>1</position>
      <time>5</time>
     </setting>
    </traverse>
    <output>gear/gear-pos-norm</output>
   </kinematic>

  </channel>

  <channel name="Throttle">

   <pure_gain name="fcs/throttle1">
    <input>fcs/throttle-cmd-norm</input>
    <gain>1</gain>
    <output>fcs/throttle-pos-norm</output>
   </pure_gain>

  </channel>


 </flight_control>

  <aerodynamics>

  <axis name="LIFT">

    <function name="aero/force/Lift_alpha">
      <description>Lift due to alpha</description>
      <product>
          <property>aero/qbar-psf</property>
          <property>metrics/Sw-sqft</property>
          <table>
            <independentVar lookup="row">aero/alpha-rad</independentVar>
            <tableData>
               0.0000 -0.03644
               0.1745  0.62214
               0.3490  0.90974
               0.4363  0.81466
            </tableData>
          </table>
      </product>
    </function>
<!--
    <function name="aero/force/Lift_flap">
       <description>Delta Lift due to flaps</description>
       <product>
           <property>aero/qbar-psf</property>
           <property>metrics/Sw-sqft</property>
           <property>fcs/flap-pos-deg</property>
           <value> 0.0086 </value>
       </product>
    </function>
-->
<!--    <function name="aero/force/Lift_speedbrake">
       <description>Delta Lift due to speedbrake</description>
       <product>
           <property>aero/qbar-psf</property>
           <property>metrics/Sw-sqft</property>
           <property>fcs/speedbrake-pos-norm</property>
           <value>0</value>
       </product>
    </function>
-->
<!--
   <function name="aero/coefficient/CLDh">
    <description>Lift_due_to_horizontal_tail_deflection</description>
    <product>
     <property>aero/qbar-psf</property>
     <property>metrics/Sw-sqft</property>
       <table>
        <independentVar lookup="row">aero/alpha-rad</independentVar>
        <independentVar lookup="column">fcs/elevator-pos-rad</independentVar>
        <tableData>
					-0.3490		-0.1745		0.0000	0.1745
		 -0.08726	0.220032	0.5340		0.6417	0.543204
		  0.0000	0.322026	0.5764		0.6589	0.569562
		  0.0873	0.496218	0.6062		0.6474	0.619986
		  0.1745	0.573		0.5328		0.5959	0.76209
        </tableData>
       </table>
    </product>
   </function>
-->
    <function name="aero/force/Lift_elevator">
       <description>Lift due to Elevator Deflection</description>
       <product>
           <property>aero/qbar-psf</property>
           <property>metrics/Sw-sqft</property>
           <property>fcs/elevator-pos-rad</property>
           <value>0.5297</value>
       </product>
    </function>

  </axis>

  <axis name="DRAG">

    <function name="aero/force/Drag_basic">
       <description>Drag at zero lift</description>
       <product>
          <property>aero/qbar-psf</property>
          <property>metrics/Sw-sqft</property>
          <table>
            <independentVar lookup="row">aero/alpha-rad</independentVar>
            <tableData>
             -0.34904    0.363054
             -0.08726    0.050622
              0.00000    0.036613
              0.08726    0.050622
              0.34904    0.363054
            </tableData>
          </table>
       </product>
    </function>

    <function name="aero/force/Drag_induced">
       <description>Induced drag</description>
         <product>
           <property>aero/qbar-psf</property>
           <property>metrics/Sw-sqft</property>
           <property>aero/cl-squared</property>
           <value>0.084</value>
         </product>
    </function>

   <function name="aero/coefficient/CDmach">
    <description>Drag_due_to_mach</description>
    <product>
     <property>aero/qbar-psf</property>
     <property>metrics/Sw-sqft</property>
       <table>
        <independentVar>velocities/mach</independentVar>
        <tableData>
         0.15	0.0565
	 0.3	0.0566
	 0.5	0.0570
	 0.65	0.0576
        </tableData>
       </table>
    </product>
   </function>

<!--    <function name="aero/force/Drag_flap">
       <description>Drag due to flaps</description>
         <product>
           <property>aero/qbar-psf</property>
           <property>metrics/Sw-sqft</property>
           <value> 0.0011 </value>
         </product>
    </function>

    <function name="aero/force/Drag_speedbrake">
       <description>Drag due to speedbrakes</description>
         <product>
           <property>aero/qbar-psf</property>
           <property>metrics/Sw-sqft</property>
           <property>fcs/speedbrake-pos-norm</property>
           <value>0.000</value>
         </product>
    </function>
-->
    <function name="aero/force/Drag_beta">
       <description>Drag due to sideslip</description>
       <product>
          <property>aero/qbar-psf</property>
          <property>metrics/Sw-sqft</property>
          <table>
            <independentVar lookup="row">aero/beta-rad</independentVar>
            <tableData>
              -1.57    1.230
              -0.26    0.050
               0.00    0.000
               0.26    0.050
               1.57    1.230
            </tableData>
          </table>
       </product>
    </function>

   <function name="aero/coefficient/CDDh">
    <description>Drag_due_to_horizontal_tail_deflection</description>
    <product>
     <property>aero/qbar-psf</property>
     <property>metrics/Sw-sqft</property>
       <table name="CDdHT">
        <independentVar lookup="row">aero/alpha-rad</independentVar>
        <independentVar lookup="column">fcs/elevator-pos-rad</independentVar>
        <tableData>
                		-0.3491 -0.1745	0.1745	0.3491
		-0.1047	 0.1535  0.0940	0.0251	0.0846
		-0.0524	 0.1331  0.0753	0.0405	0.0983
		 0.0000	 0.1126  0.0567	0.0551	0.1111
		 0.0524	 0.0922  0.0385	0.0690	0.1227
		 0.1047	 0.0720  0.0208	0.0817	0.1330
		 0.1571	 0.0524  0.0038	0.0934	0.1420
        </tableData>
       </table>
    </product>
   </function>

  </axis>

  <axis name="SIDE">

    <function name="aero/force/Side_beta">
       <description>Side force due to beta</description>
       <product>
           <property>aero/qbar-psf</property>
           <property>metrics/Sw-sqft</property>
           <property>aero/beta-rad</property>
           <value>-0.88242</value>
       </product>
    </function>

    <function name="aero/coefficient/CYdr">
		<description>Side_force_due_to_rudder</description>
		<product>
			<property>aero/qbar-psf</property>
			<property>metrics/Sw-sqft</property>
			<property>fcs/rudder-pos-rad</property>
			<value>0.4584</value>
		</product>
    </function>

   <function name="aero/coefficient/CYb_M">
    <description>Change_in_Side_force_due_to_beta_due_to_mach</description>
    <product>
     <property>aero/qbar-psf</property>
     <property>metrics/Sw-sqft</property>
     <property>aero/beta-rad</property>
       <table>
        <independentVar>velocities/mach</independentVar>
        <tableData>
          0.15	-0.61822
	  0.4	-0.63907
	  0.65	-0.692602
        </tableData>
       </table>
    </product>
   </function>

    <function name="aero/coefficient/CYDa">
    <description>Side_force_due_to_aileron</description>
    <product>
     <property>aero/qbar-psf</property>
     <property>metrics/Sw-sqft</property>
     <property>fcs/left-aileron-pos-rad</property>
     <value>-0.06512</value>
    </product>
   </function>

   <function name="aero/coefficient/CYp">
    <description>Side_force_due_to_roll_rate</description>
    <product>
     <property>aero/qbar-psf</property>
     <property>metrics/Sw-sqft</property>
     <property>aero/bi2vel</property>
     <property>velocities/p-aero-rad_sec</property>
       <table>
        <independentVar>aero/alpha-rad</independentVar>
        <tableData>
         -0.10472	-0.409359
	 -0.05236	-0.283051
	  0		-0.179365
	  0.05236	-0.095875
	  0.10472	-0.026013
	  0.15708	 0.032902
        </tableData>
       </table>
    </product>
   </function>
   <function name="aero/coefficient/CYr">
    <description>Side_force_due_to_yaw_rate</description>
    <product>
     <property>aero/qbar-psf</property>
     <property>metrics/Sw-sqft</property>
     <property>aero/bi2vel</property>
     <property>velocities/r-aero-rad_sec</property>
       <table>
        <independentVar>aero/alpha-rad</independentVar>
        <tableData>
         -0.10472	0.272848
	 -0.05236	0.209114
	  0	        0.174317
	  0.05236	0.195634
	  0.10472	0.279782
	  0.15708	0.392062
        </tableData>
       </table>
    </product>
   </function>


  </axis>

  <axis name="ROLL">

<!--
   <function name="aero/coefficient/Clb">
    <description>Roll_moment_due_to_beta</description>
    <product>
     <property>aero/qbar-psf</property>
     <property>metrics/Sw-sqft</property>
     <property>metrics/bw-ft</property>
       <table>
        <independentVar lookup="row">aero/alpha-rad</independentVar>
        <independentVar lookup="column">aero/beta-rad</independentVar>
        <tableData>
					 0.0000	 0.1745	 0.2618
		 -0.1047	-0.1605	-0.1877	-0.2219
		 -0.0524	-0.1778	-0.2117	-0.2377
		  0.0000	-0.2081	-0.2398	-0.2569
		  0.0524	-0.2491	-0.2692	-0.2769
		  0.1047	-0.2967	-0.3000	-0.2977
		  0.1571	-0.3486	-0.3373	-0.3239

        </tableData>
       </table>
    </product>
   </function>
-->

    <function name="aero/moment/Roll_beta">
       <description>Roll moment due to beta</description>
       <product>
           <property>aero/qbar-psf</property>
           <property>metrics/Sw-sqft</property>
           <property>metrics/bw-ft</property>
           <property>aero/beta-rad</property>
           <value>-0.25785</value>
       </product>
    </function>

   <function name="aero/coefficient/Clp">
    <description>Roll_moment_due_to_roll_rate_(roll_damping)</description>
    <product>
     <property>aero/qbar-psf</property>
     <property>metrics/Sw-sqft</property>
     <property>metrics/bw-ft</property>
     <property>aero/bi2vel</property>
     <property>velocities/p-aero-rad_sec</property>
       <table>
        <independentVar>aero/alpha-rad</independentVar>
        <tableData>
         -0.10472	-0.467511
	 -0.05236	-0.42221
	  0	        -0.392363
	  0.05236	-0.374778
	  0.10472	-0.369569
	  0.15708	-0.384124
        </tableData>
       </table>
    </product>
   </function>

   <function name="aero/coefficient/Clr">
    <description>Roll_moment_due_to_yaw_rate</description>
    <product>
     <property>aero/qbar-psf</property>
     <property>metrics/Sw-sqft</property>
     <property>metrics/bw-ft</property>
     <property>aero/bi2vel</property>
     <property>velocities/r-aero-rad_sec</property>
       <table>
        <independentVar>aero/alpha-rad</independentVar>
        <tableData>
         -0.10472	0.299107
	 -0.05236	0.285792
	  0	  	0.283598
	  0.05236	0.292948
	  0.10472	0.306879
	  0.15708	0.310725
        </tableData>
       </table>
    </product>
   </function>

   <function name="aero/coefficient/Clda">
    <description>Roll_moment_due_to_aileron</description>
    <product>
     <property>aero/qbar-psf</property>
     <property>metrics/Sw-sqft</property>
     <property>metrics/bw-ft</property>
     <property>fcs/left-aileron-pos-rad</property>
       <table>
        <independentVar lookup="row">aero/alpha-rad</independentVar>
        <independentVar lookup="column">aero/beta-rad</independentVar>
        <tableData>
			0.0000	0.1745	0.2618
         -0.1047	0.1498	0.1451	0.1393
	 -0.0524	0.1505	0.1457	0.1398
	  0.0000	0.1508	0.1460	0.1402
	  0.0524	0.1514	0.1466	0.1407
	  0.1047	0.1502	0.1452	0.1392
	  0.1571	0.1517	0.1464	0.1400
        </tableData>
       </table>
    </product>
   </function>

   <function name="aero/coefficient/Clda_M">
    <description>Change_in_Roll_moment_due_to_aileron_due_to_mach</description>
    <product>
     <property>aero/qbar-psf</property>
     <property>metrics/Sw-sqft</property>
     <property>metrics/bw-ft</property>
     <property>aero/alpha-rad</property>
     <property>fcs/left-aileron-pos-rad</property>
       <table>
        <independentVar>velocities/mach</independentVar>
        <tableData>
         0.15	0.150798
	  0.4	0.156274
	  0.65	0.170023
        </tableData>
       </table>
    </product>
   </function>

   <function name="aero/coefficient/Cldr_M">
    <description>Change_in_Roll_moment_due_to_rudder_due_to_mach</description>
    <product>
     <property>aero/qbar-psf</property>
     <property>metrics/Sw-sqft</property>
     <property>metrics/bw-ft</property>
     <property>aero/alpha-rad</property>
     <property>fcs/rudder-pos-rad</property>
       <table>
        <independentVar>velocities/mach</independentVar>
        <tableData>
         0.15	0.15377
	  0.4	0.1581
	  0.65	0.168117
        </tableData>
       </table>
    </product>
   </function>
   <function name="aero/coefficient/Cldr">
    <description>Roll_moment_due_to_rudder</description>
    <product>
     <property>aero/qbar-psf</property>
     <property>metrics/Sw-sqft</property>
     <property>metrics/bw-ft</property>
     <property>fcs/rudder-pos-rad</property>
       <table>
        <independentVar lookup="row">aero/alpha-rad</independentVar>
        <independentVar lookup="column">aero/beta-rad</independentVar>
        <tableData>
			0.0000	0.1745	0.2618
         -0.1047 	0.1612	0.1597	0.1575
	 -0.0524	0.1577	0.1563	0.1545
	  0.0000	0.1538	0.1526	0.1512
	  0.0524	0.1497	0.1485	0.1476
	  0.1047	0.1444	0.1442	0.1436
	  0.1571	0.1393	0.1395	0.1393
        </tableData>
       </table>
    </product>
   </function>

  </axis>

  <axis name="PITCH">

    <function name="aero/moment/Pitch_alpha">
       <description>Pitch moment due to alpha</description>
       <product>
           <property>aero/qbar-psf</property>
           <property>metrics/Sw-sqft</property>
           <property>metrics/cbarw-ft</property>
           <property>aero/alpha-rad</property>
           <value>-0.475</value>
       </product>
    </function>

    <function name="aero/moment/Pitch_elevator">
       <description>Pitch moment due to elevator</description>
       <product>
          <property>aero/qbar-psf</property>
          <property>metrics/Sw-sqft</property>
          <property>metrics/cbarw-ft</property>
          <property>fcs/elevator-pos-rad</property>
          <table>
            <independentVar lookup="row">velocities/mach</independentVar>
            <tableData>
              0.15     -1.7
              0.65     -1.7
            </tableData>
          </table>
       </product>
    </function>

   <function name="aero/coefficient/Cmq">
    <description>Pitch_moment_due_to_pitch_rate</description>
    <product>
     <property>aero/qbar-psf</property>
     <property>metrics/Sw-sqft</property>
     <property>metrics/cbarw-ft</property>
     <property>aero/ci2vel</property>
     <property>velocities/q-aero-rad_sec</property>
       <table>
        <independentVar>aero/alpha-rad</independentVar>
        <tableData>
         -0.10472	-15.82497
	 -0.05236	-14.686479
	  0		-14.164387
	  0.05236	-13.891332
	  0.10472	-14.909641
	  0.15708	-16.110348
        </tableData>
       </table>
    </product>
   </function>

<!--    <function name="aero/moment/Pitch_alphadot">
       <description>Pitch moment due to alpha rate</description>
       <product>
           <property>aero/qbar-psf</property>
           <property>metrics/Sw-sqft</property>
           <property>metrics/cbarw-ft</property>
           <property>aero/ci2vel</property>
           <property>aero/alphadot-rad_sec</property>
           <value>-9.51180</value>
       </product>
    </function>
-->
  </axis>

  <axis name="YAW">
<!--
   <function name="aero/coefficient/Cnb">
    <description>Yaw_moment_due_to_beta</description>
    <product>
     <property>aero/qbar-psf</property>
     <property>metrics/Sw-sqft</property>
     <property>metrics/bw-ft</property>
       <table>
        <independentVar lookup="row">aero/alpha-rad</independentVar>
        <independentVar lookup="column">aero/beta-rad</independentVar>
        <tableData>
					0.0000	0.1745	0.2618
         -0.1047	0.06303	0.06303	0.06303
		 -0.0524	0.06303	0.06303	0.06303
		  0.0000	0.06303	0.06303	0.06303
		  0.0524	0.06303	0.06303	0.06303
		  0.1047	0.06303	0.06303	0.06303
		  0.1571	0.06303	0.06303	0.06303
        </tableData>
       </table>
    </product>
   </function>
-->
    <function name="aero/moment/Yaw_beta">
       <description>Yaw moment due to beta</description>
       <product>
           <property>aero/qbar-psf</property>
           <property>metrics/Sw-sqft</property>
           <property>metrics/bw-ft</property>
           <property>aero/beta-rad</property>
           <value>0.06303</value>
       </product>
    </function>

   <function name="aero/coefficient/Cnb_M">
    <description>Change_in_Yaw_moment_due_to_beta_due_to_mach</description>
    <product>
     <property>aero/qbar-psf</property>
     <property>metrics/Sw-sqft</property>
     <property>metrics/bw-ft</property>
     <property>aero/beta-rad</property>
       <table>
        <independentVar>velocities/mach</independentVar>
        <tableData>
          0.15	0.029697
	  0.4	0.014832
	  0.65 -0.030796
        </tableData>
       </table>
    </product>
   </function>

   <function name="aero/coefficient/Cnp">
    <description>Yaw_moment_due_to_roll_rate</description>
    <product>
     <property>aero/qbar-psf</property>
     <property>metrics/Sw-sqft</property>
     <property>metrics/bw-ft</property>
     <property>aero/bi2vel</property>
     <property>velocities/p-aero-rad_sec</property>
       <table>
        <independentVar>aero/alpha-rad</independentVar>
        <tableData>
          -0.10472	0.260262
	  -0.05236	0.187266
	   0		0.128501
	   0.05236	0.095759
	   0.10472	0.019397
	   0.15708     -0.013341
        </tableData>
       </table>
    </product>
   </function>

   <function name="aero/coefficient/Cnr">
    <description>Yaw_moment_due_to_yaw_rate</description>
    <product>
     <property>aero/qbar-psf</property>
     <property>metrics/Sw-sqft</property>
     <property>metrics/bw-ft</property>
     <property>aero/bi2vel</property>
     <property>velocities/r-aero-rad_sec</property>
       <table>
        <independentVar>aero/alpha-rad</independentVar>
        <tableData>
         -0.10472	-0.900781
	  -0.05236	-0.844497
	  0		-0.813659
	  0.05236	-0.872248
	  0.10472	-0.953815
	  0.15708	-1.121557
        </tableData>
       </table>
    </product>
   </function>

   <function name="aero/coefficient/Cnda_M">
    <description>Change_in_Yaw_moment_due_to_aileron_due_to_mach</description>
    <product>
     <property>aero/qbar-psf</property>
     <property>metrics/Sw-sqft</property>
     <property>metrics/bw-ft</property>
     <property>fcs/left-aileron-pos-rad</property>
       <table>
        <independentVar>velocities/mach</independentVar>
        <tableData>
          0.15	0.036097
	  0.4	0.038135
	  0.65	0.043124
        </tableData>
       </table>
    </product>
   </function>

   <function name="aero/coefficient/Cnda">
    <description>Yaw_moment_due_to_aileron</description>
    <product>
     <property>aero/qbar-psf</property>
     <property>metrics/Sw-sqft</property>
     <property>metrics/bw-ft</property>
     <property>fcs/left-aileron-pos-rad</property>
       <table>
        <independentVar lookup="row">aero/alpha-rad</independentVar>
        <independentVar lookup="column">aero/beta-rad</independentVar>
        <tableData>
                       0.0000	0.1745	0.2618
         -0.1047	0.0479	0.0466	0.0459
	 -0.0524	0.0446	0.0442	0.0444
	  0.0000	0.0361	0.0234	0.0387
	  0.0524	0.0264	0.0392	0.0294
	  0.1047	0.0370	0.0273	0.0375
	  0.1571	0.0193	0.0377	0.0276
        </tableData>
       </table>
    </product>
   </function>

   <function name="aero/coefficient/Cndr">
    <description>Yaw_moment_due_to_rudder</description>
    <product>
     <property>aero/qbar-psf</property>
     <property>metrics/Sw-sqft</property>
     <property>metrics/bw-ft</property>
     <property>fcs/rudder-pos-rad</property>
       <table>
        <independentVar lookup="row">aero/alpha-rad</independentVar>
        <independentVar lookup="column">aero/beta-rad</independentVar>
        <tableData>
			 0.0000	 0.1745	 0.2618
         -0.1047	-0.2823	-0.2820	-0.2861
	 -0.0524	-0.2846	-0.2846	-0.2892
	  0.0000	-0.2776	-0.2858	-0.2906
	  0.0524	-0.2872	-0.2853	-0.2904
	  0.1047	-0.2759	-0.2830	-0.2883
	  0.1571	-0.2716	-0.2788	-0.2843
        </tableData>
       </table>
    </product>
   </function>

   <function name="aero/coefficient/Cndr_M">
    <description>Change_in_Yaw_moment_due_to_rudder_due_to_mach</description>
    <product>
     <property>aero/qbar-psf</property>
     <property>metrics/Sw-sqft</property>
     <property>metrics/bw-ft</property>
     <property>aero/alpha-rad</property>
     <property>fcs/rudder-pos-rad</property>
       <table>
        <independentVar>velocities/mach</independentVar>
        <tableData>
         0.15	-0.277603
	  0.4	-0.28515
	  0.65	-0.302407
        </tableData>
       </table>
    </product>
   </function>
<!--
    <function name="aero/moment/Yaw_aileron">
       <description>Adverse yaw</description>
       <product>
           <property>aero/qbar-psf</property>
           <property>metrics/Sw-sqft</property>
           <property>metrics/bw-ft</property>
           <property>fcs/left-aileron-pos-rad</property>
           <value>-0.0279</value>
       </product>
    </function>
-->
<!--	<function name="aero/coefficient/Cnp">
		<description>Yaw_moment_due_to_roll_rate</description>
		<product>
			<property>aero/qbar-psf</property>
			<property>metrics/Sw-sqft</property>
			<property>metrics/bw-ft</property>
			<property>aero/bi2vel</property>
			<property>velocities/p-aero-rad_sec</property>
			<value>0.1285</value>
       </product>
    </function>
	-->
  </axis>

 </aerodynamics>

 <external_reactions>
 </external_reactions>

</fdm_config>
