<?xml version="1.0"?>
<!--
  File:     Old_HSTD_Engine.xml
  Author:   Aero-Matic v 0.83

  Inputs:
    name:           Old_HSTD_Engine
    type:           turbine
    thrust:         110.152 lb
    augmented?      no
    injected?       no
-->

<turbine_engine name="Old_HSTD_Engine">
  <milthrust>   110.2 </milthrust>
  <bypassratio>     0.0 </bypassratio>
  <tsfc>            0.5 </tsfc>
  <bleed>           0.03</bleed>
  <idlen1>          30.0 </idlen1>
  <idlen2>          60.0 </idlen2>
  <ignitionn1>      30.0 </ignitionn1>
  <ignitionn2>      30.0 </ignitionn2>
  <maxn1>          100.0 </maxn1>
  <maxn2>          100.0 </maxn2>
  <augmented>         0 </augmented>
  <injected>          0 </injected>

  <function name="IdleThrust">
   <table>
    <independentVar lookup="row">velocities/mach</independentVar>
    <independentVar lookup="column">atmosphere/density-altitude</independentVar>
    <tableData>
           0         5000      10000     15000     20000
     0.15  0.383427  0.317857  0.261733  0.213963  0.173822
     0.30  0.410490  0.340561  0.280804  0.229765  0.186900
     0.50  0.473698  0.393235  0.324396  0.265729  0.216143
     0.65  0.533455  0.443184  0.365627  0.299512  0.243751
     0.85  0.581769  0.533273  0.444818  0.364355  0.296243
    </tableData>
   </table>
  </function>

  <function name="MilThrust">
   <table>
    <independentVar lookup="row">velocities/mach</independentVar>
    <independentVar lookup="column">atmosphere/density-altitude</independentVar>
    <tableData>
           0         5000      10000     15000     20000
     0.15  0.928143  0.770486  0.635169  0.519833  0.422478
     0.30  0.909253  0.754502  0.621910  0.508935  0.413578
     0.50  0.958112  0.794824  0.654967  0.535816  0.435192
     0.65  1.053106  0.873471  0.719629  0.588490  0.477876
     0.85  1.160269  1.038939  0.868022  0.709820  0.576139
    </tableData>
   </table>
  </function>

</turbine_engine>
